// COMSOL Multiphysics 5.6.0.280 model "Task 3.1 1D schrodinger.mph"
// Outline of the model tree

Parameters
  me = me_const  // mass of electron
  hbar = h_const/(2*pi)  // reduced plancks constant

Geometry
  geom1 "Geometry 1" (1D, length unit m)
    i1: Interval | coord = {0, 1e-9}
    fin: Finalize "Form Union"

Physics
  c: CoefficientFormPDE on all domains
    dependent variable u
    cfeq1: CoefficientFormPDE (default) | c = hbar^2/(2*me); f = 1; da = 1
    zflx1: ZeroFluxBoundary "Zero Flux 1" (default)
    init1: init "Initial Values 1" (default)
    dir1: DirichletBoundary "Dirichlet Boundary Condition 1" on boundaries 1, 2 | r = 0

Mesh
  mesh1 "Mesh 1" (physics-controlled)

Studies
  std1 "Study 1"
    eigv: Eigenvalue | neigs = 4

Solver configurations
  sol1 "Solution 1" (study std1)
    v1: Variables "Dependent Variables 1"
    e1: Eigenvalue "Eigenvalue Solver 1"
      dDef: Direct

Datasets
  dset1: Solution | solution = sol1

Plots
  pg1: PlotGroup1D "1D Plot Group 1" | data = dset1
    lngr1: LineGraph on all domains
      expr = u
      title = First four wavefunctions for 1D schrodinger equation
      xdata = expr
      xdataexpr = x
      legends = {Ground state wavefunction, 1st excited state wavefunction, 2nd excited state wavefunction, 3rd excited state wavefunction}
  pg2: PlotGroup1D "1D Plot Group 2" | data = dset1
    lngr1: LineGraph on all domains
      expr = lambda
      title = Energy eigenvalues of first four states
      xdata = expr
      xdataexpr = x
      legends = {Ground state energy, 1st excited state energy, 2nd excited state energy, 3rd excited state energy}