// COMSOL Multiphysics 5.6.0.280 model "Task 2 2d hall effect.mph"
// Outline of the model tree

Parameters
  sigma0 = 1.04e3[S/m]  // Silicon conductivity
  Rh = 1.25e-4[m^3/C]  // Hall coefficient
  Bz = 0.1[T]  // Magnetic field
  coeff0 = sigma0/(1+(sigma0*Rh*Bz)^2)  // Conductivity anisotropy 2
  V0 = 5.0[V]  // Applied voltage
  t_Si = 1.0e-3[m]  // Silicon thickness
  coeff1 = sigma0*Rh*Bz  // Conductivity anisotropy 1
  s11 = coeff0  // Conductivity matrix term 11
  s12 = coeff0*coeff1  // Conductivity matrix term 12
  s21 = -coeff0*coeff1  // Conductivity matrix term 21
  s22 = coeff0  // Conductivity matrix term 22
  epsilon_Si = 11.68  // Relative permeability silicon

Probes
  bnd1: Boundary "Boundary Probe 1" on boundaries 5
    probename = V1
    expr = V
    unit = V
    descr = Electric potential
    table = tbl1
  bnd2: Boundary "Boundary Probe 2" on boundaries 4
    probename = V2
    expr = V
    unit = V
    descr = Electric potential
    table = tbl1
  var1: GlobalVariable "Global Variable Probe 1" | probename = deltaV; expr = V1-V2; unit = V; table = tbl1

Geometry
  geom1 "Geometry 1" (2D, length unit m)
    r1: Rectangle | pos = {-9e-3, -3e-3}; size = {1.8e-2, 6e-3}
    pt1: Point | p = {-1e-3, 3e-3}
    pt2: Point | p = {1e-3, 3e-3}
    pt3: Point | p = {-1e-3, -3e-3}
    pt4: Point | p = {1e-3, -3e-3}
    fin: Finalize "Form Union"

Physics
  ec: ConductiveMedia "Electric Currents" on all domains
    dependent variable V
    d.d = t_Si
    cucn1: CurrentConservation (default)
      sigma_mat = userdef
      sigma = {s11, s12, 0, s21, s22, 0, 0, 0, 0}
      epsilonr_mat = userdef
      epsilonr = epsilon_Si
    ein1: ElectricInsulation (default)
    init1: init "Initial Values 1" (default)
    ein2: ElectricInsulation on boundaries 2, 3, 6, 7
    gnd1: Ground on boundaries 1
    pot1: ElectricPotential on boundaries 8 | V0 = V0

Mesh
  mesh1 "Mesh 1" (physics-controlled)
    size: MeshSizeDefault | hauto = 2

Studies
  std1 "Study 1"
    param: Parametric "Parametric Sweep" | pname = Bz; plistarr = range(-1,0.1,1); punit = T
    stat: Stationary

Solver configurations
  sol1 "Solution 1" (study std1)
    v1: Variables "Dependent Variables 1"
    s1: Stationary "Stationary Solver 1"
      dDef: Direct
      p1: Parametric | pname = Bz; plistarr = range(-1,0.1,1); punit = T; pcontinuationmode = no
      fc1: FullyCoupled | linsolver = dDef

Datasets
  dset1: Solution | solution = sol1
  dset2: Solution "Probe Solution 2" | solution = sol1
  avh1: Average "Boundary Probe 1" on boundaries 5 | data = dset2
  avh2: Average "Boundary Probe 2" on boundaries 4 | data = dset2

Derived values
  pev1: EvalPoint "Boundary Probe 1" | data = avh1; table = tbl1; expr = V
  gev1: EvalGlobal "Global Variable Probe 1" | data = dset2; table = tbl1; expr = V1-V2
  pev2: EvalPoint "Boundary Probe 2" | data = avh2; table = tbl1; expr = V

Tables
  tbl1: Table "Probe Table 1"
    Bz (T) | Electric potential (V), Boundary Probe 1 | V1-V2 (V) | Electric potential (V), Boundary Probe 2
    -1 | 2.60637 | 0.212736 | 2.39363
    -0.9 | 2.59578 | 0.19157 | 2.40422
    -0.8 | 2.58518 | 0.170369 | 2.41482
    -0.7 | 2.57457 | 0.149139 | 2.42543
    -0.6 | 2.56394 | 0.127883 | 2.43606
    -0.5 | 2.5533 | 0.106604 | 2.4467
    -0.4 | 2.54265 | 0.0853056 | 2.45735
    -0.3 | 2.532 | 0.0639925 | 2.468
    -0.2 | 2.52133 | 0.042668 | 2.47867
    -0.1 | 2.51067 | 0.0213359 | 2.48933
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
Plots
  pg1: PlotGroup1D "Probe Plot Group 1"
    tblp1: Table "Probe Table Graph 1" | table = tbl1
  pg2: PlotGroup2D "Electric Potential (ec)" | data = dset1
    surf1: Surface | expr = V
    con1: Contour | expr = V

Exports
  anim2: Animation | giffilename = C:\Users\phwhh\OneDrive - Loughborough University\COMSOL CW\Hall effect.gif