// COMSOL Multiphysics 5.6.0.280 model "Task 3.2.2and3 3d hall effect.mph"
// Outline of the model tree

Parameters
  sigma0 = 1.04e3[S/m]  // Silicon conductivity
  Rh = 1.25e-4[m^3/C]  // Hall coefficient
  Bz = 1[T]  // Magnetic field
  coeff0 = sigma0/(1+(sigma0*Rh*Bz)^2)  // Conductivity anisotropy 2
  V0 = 5.0[V]  // Applied voltage
  t_Si = 1.0e-3[m]  // Silicon thickness
  coeff1 = sigma0*Rh*Bz  // Conductivity anisotropy 1
  s11 = coeff0  // Conductivity matrix term 11
  s12 = coeff0*coeff1  // Conductivity matrix term 12
  s21 = -coeff0*coeff1  // Conductivity matrix term 21
  s22 = coeff0  // Conductivity matrix term 22
  epsilon_Si = 11.68  // Relative permeability silicon
  Thickness = 1000[um]  // Thickness of block

Probes
  bnd1: Boundary "Boundary Probe 1" on boundaries 7
    probename = V1
    expr = V
    unit = V
    descr = Electric potential
    table = tbl1
  bnd2: Boundary "Boundary Probe 2" on boundaries 15
    probename = V2
    expr = V
    unit = V
    descr = Electric potential
    table = tbl1
  bnd3: Boundary "Boundary Probe 3" on boundaries 21
    probename = V3
    expr = V
    unit = V
    descr = Electric potential
    table = tbl1
  var1: GlobalVariable "Global Variable Probe 1" | probename = V_xy; expr = V1-V2; unit = V; table = tbl1
  var2: GlobalVariable "Global Variable Probe 2" | probename = V_xx; expr = V1-V3; unit = V; table = tbl1

Geometry
  geom1 "Geometry 1" (3D, length unit m)
    blk1: Block | size = {1.8e-2, 6e-3, Thickness}
    blk2: Block | pos = {3e-3, -2e-3, 0}; size = {2e-3, 2e-3, Thickness}
    blk3: Block | pos = {13e-3, -2e-3, 0}; size = {2e-3, 2e-3, Thickness}
    blk4: Block | pos = {3e-3, 6e-3, 0}; size = {2e-3, 2e-3, Thickness}
    fin: Finalize "Form Union"

Physics
  ec: ConductiveMedia "Electric Currents" on all domains
    dependent variable V
    cucn1: CurrentConservation (default)
      sigma_mat = userdef
      sigma = {s11, s21, 0, s12, s22, 0, 0, 0, sigma0}
      epsilonr_mat = userdef
      epsilonr = epsilon_Si
    ein1: ElectricInsulation (default)
    init1: init "Initial Values 1" (default)
    pot1: ElectricPotential on boundaries 27 | V0 = V0
    gnd1: Ground on boundaries 1
    ein2: ElectricInsulation on boundaries 2, 5, 17, 19, 26

Mesh
  mesh1 "Mesh 1"
    size: MeshSizeDefault | hauto = 4
    auto_f1: FreeTet "Free Tetrahedral 1" on remaining entities | optcurved = on

Studies
  std1 "Study 1"
    param1: Parametric "Parametric Sweep 1" | pname = Thickness; plistarr = range(5e-7,1e-7,1e-6); punit = m
    stat: Stationary

Tables
  tbl1: Table "Probe Table 1"
    Thickness (m) | Electric potential (V), Boundary Probe 1 | Electric potential (V), Boundary Probe 2 | V1-V2 (V) | Electric potential (V), Boundary Probe 3 | V1-V3 (V)
    5e-07 | 1.54818 | 1.87511 | -0.326933 | 4.0196 | -2.47141
    6e-07 | 0.804278 | 1.42581 | -0.621534 | 4.80292 | -3.99865
    7e-07 | 0.736406 | 1.28574 | -0.54933 | 3.93715 | -3.20075
    8e-07 | 1.39189 | 1.10023 | 0.29166 | 4.1772 | -2.78531
    9e-07 | 1.19056 | 1.384 | -0.193446 | 4.61277 | -3.42222
    1e-06 | 0.839649 | 1.37953 | -0.539881 | 3.93839 | -3.09874

Plots
  pg2: PlotGroup1D "Probe Plot Group 2"
    tblp1: Table "Probe Table Graph 1" | table = tbl1
  pg4: PlotGroup1D "Probe Plot Group 4" | data = none
    tblp1: Table "Probe Table Graph 1" | table = tbl1