// COMSOL Multiphysics 5.6.0.280 model "Task 3.3.1.1 wire on block.mph"
// Outline of the model tree

Parameters
  w_wire = 5[um]  // width of nanowire
  l_wire = 20[um]  // length of nanowire
  h_wire = 1[um]  // thickness of nanowire
  w_sub = 20[um]  // width of substrate
  htc = 5[W/m^2/K]  // Heat transfer coefficient of air
  T0 = 273.15[K]  // Ambient temperature
  I = 10[mA]  // current through wire
  A = w_wire*h_wire  // Areas of current boundary
  J = I/A  // current density
  V0 = 1[mV]  // bias voltage

Probes
  point1: Point "Point Probe 1" on points 9 | expr = T; unit = K; descr = Temperature; table = tbl1

Geometry
  geom1 "Geometry 1" (3D, length unit m)
    blk1: Block | size = {w_sub, w_sub, w_sub}
    blk2: Block | pos = {w_sub/2, w_sub/2, (w_sub)+(h_wire/2)}; base = center; size = {l_wire, w_wire, h_wire}
    pt1: Point | p = {10e-6, 10e-6, 21e-6}
    fin: Finalize "Form Union"

Materials
  mat2: Common "Copper" on domains 2
    def "Basic"
      relpermeability = 1
      electricconductivity = 5.998e7[S/m]
      thermalexpansioncoefficient = 17e-6[1/K]
      heatcapacity = 385[J/(kg*K)]
      relpermittivity = 1
      density = 8960[kg/m^3]
      thermalconductivity = 400[W/(m*K)]
    Enu "Young's modulus and Poisson's ratio"
      youngsmodulus = 110e9[Pa]
      poissonsratio = 0.35
    linzRes "Linearized resistivity"
      rho0 = 1.72e-8[ohm*m]
      alpha = 0.0039[1/K]
      Tref = 298[K]
  mat3: Common "Silica glass" on domains 1
    def "Basic"
      relpermeability = 1
      electricconductivity = 1e-14[S/m]
      thermalexpansioncoefficient = 0.55e-6[1/K]
      heatcapacity = 703[J/(kg*K)]
      relpermittivity = 3.75
      density = 2203[kg/m^3]
      thermalconductivity = 1.38[W/(m*K)]
    Enu "Young's modulus and Poisson's ratio"
      youngsmodulus = 73.1e9[Pa]
      poissonsratio = 0.17
    RefractiveIndex
      n = 1.45
      ki = 0

Physics
  ec: ConductiveMedia "Electric Currents" on all domains
    dependent variable V
    cucn1: CurrentConservation (default)
    ein1: ElectricInsulation (default)
    init1: init "Initial Values 1" (default)
    gnd1: Ground on boundaries 13
    ncd1: NormalCurrentDensity on boundaries 5 | nJ = J
  ht: HeatTransfer "Heat Transfer in Solids" on all domains
    dependent variable T
    solid1: SolidHeatTransferModel "Solid 1" (default)
    init1: init "Initial Values 1" (default)
    ins1: ThermalInsulation (default)
    temp1: TemperatureBoundary "Temperature 1" on boundaries 5, 13

Multiphysics
  emh1: ElectromagneticHeating on all domains | EMHeat_physics = ec; Heat_physics = ht

Mesh
  mesh1 "Mesh 1" (physics-controlled)

Studies
  std1 "Study 1"
    param: Parametric "Parametric Sweep" | pname = w_wire; plistarr = range(1e-6,1e-6,10e-6); punit = m
    stat: Stationary

Tables
  tbl1: Table "Probe Table 1"
    w_wire (m) | Temperature (K), Point Probe 1
    1e-06 | 293.343
    2e-06 | 293.199
    3e-06 | 293.172
    4e-06 | 293.162
    5e-06 | 293.158
    6e-06 | 293.155
    7e-06 | 293.154
    8e-06 | 293.153
    9e-06 | 293.152
    1e-05 | 293.152

Plots
  pg8: PlotGroup1D "Probe Plot Group 8" | data = none
    tblp1: Table "Probe Table Graph 1" | table = tbl1