// COMSOL Multiphysics 5.6.0.280 model "Task 2 constricted wire stationary.mph"
// Outline of the model tree

Parameters
  C = 430[J/(kgK)]
  rho = 8700[kg/m^3]
  sigma = 1/25e-8[Ohmm]
  J = 10^12[A/m^2]
  L = 1000[nm]
  W = 50[nm]
  H = 20[nm]

Geometry
  geom1 "Geometry 1" (3D, length unit m)
    blk1: Block | size = {L, W, H}
    blk2: Block | pos = {475e-9, 0, 0}; size = {50e-9, 15e-9, 20e-9}
    blk3: Block | pos = {475e-9, 35e-9, 0}; size = {50e-9, 15e-9, 20e-9}
    dif1: Difference | input = blk1; input2 = blk2, blk3
    fin: Finalize "Form Union"

Materials
  mat1: Common "Copper" on all domains
    def "Basic"
      relpermeability = 1
      electricconductivity = 5.998e7[S/m]
      thermalexpansioncoefficient = 17e-6[1/K]
      heatcapacity = 385[J/(kg*K)]
      relpermittivity = 1
      density = 8960[kg/m^3]
      thermalconductivity = 400[W/(m*K)]
    Enu "Young's modulus and Poisson's ratio"
      youngsmodulus = 110e9[Pa]
      poissonsratio = 0.35
    linzRes "Linearized resistivity"
      rho0 = 1.72e-8[ohm*m]
      alpha = 0.0039[1/K]
      Tref = 298[K]

Physics
  ec: ConductiveMedia "Electric Currents" on all domains
    dependent variable V
    cucn1: CurrentConservation (default) | sigma_mat = userdef; sigma = sigma
    ein1: ElectricInsulation (default)
    init1: init "Initial Values 1" (default)
    ncd1: NormalCurrentDensity on boundaries 1 | nJ = J
    gnd1: Ground on boundaries 14
  ht: HeatTransfer "Heat Transfer in Solids" on all domains
    dependent variable T
    solid1: SolidHeatTransferModel "Solid 1" (default)
      k_mat = from_mat
      rho_mat = userdef
      rho = 8700
      Cp_mat = userdef
      Cp = C
    init1: init "Initial Values 1" (default)
    ins1: ThermalInsulation (default)
    temp1: TemperatureBoundary "Temperature 1" on boundaries 1, 14

Multiphysics
  emh1: ElectromagneticHeating on all domains | EMHeat_physics = ec; Heat_physics = ht

Mesh
  mesh1 "Mesh 1" (physics-controlled)
    size: MeshSizeDefault | hauto = 3

Studies
  std1 "Study 1"
    stat: Stationary

Solver configurations
  sol1 "Solution 1" (study std1)
    v1: Variables "Dependent Variables 1"
    s1: Stationary "Stationary Solver 1"
      se1: Segregated
        ss1: SegregatedStep "Electric Currents" | segvar = {comp1_V}; linsolver = i1
        ss2: SegregatedStep "Temperature" | segvar = {comp1_T}; linsolver = d1; subdamp = 0.8
        ll1: LowerLimit | lowerlimit = comp1.T 0
      i1: Iterative | linsolver = cg
        mg1: Multigrid | prefun = amg
      d1: Direct "Direct, temperature (ht)" | linsolver = pardiso; pivotperturb = 1.0E-13

Datasets
  dset1: Solution | solution = sol1
  cln1: CutLine3D | data = dset1; genpoints = {{0, 25e-9, 10e-9}, {1000e-9, 25e-9, 10e-9}}

Tables
  mm1: Table "Maximum and Minimum Values"
    // Max/min line
    X | Y | Z | Temperature (K)
    0 | 0 | 0 | 293.15
    5e-07 | 1.5e-08 | 2e-08 | 385.835

Plots
  pg1: PlotGroup3D "Electric Potential (ec)" | data = dset1
    mslc1: Multislice | expr = V
  pg2: PlotGroup3D "Temperature (ht)" | data = dset1
    surf1: Surface | expr = T
    slc1: Slice | data = dset1; expr = T; quickxnumber = 100
  pg3: PlotGroup3D "Isothermal Contours (ht)" | data = dset1
    iso1: Isosurface | expr = T; levelrounding = off
  pg4: PlotGroup1D "1D Plot Group 4" | data = cln1
    lngr1: LineGraph | data = cln1; expr = T