// COMSOL Multiphysics 5.6.0.280 model "Task 3 thermal conductivity.mph"
// Outline of the model tree

Parameters
  W_Cu = 5[mm]
  H_Cu = 10[mm]
  W_Al = 20[mm]
  H_Al = 2[mm]
  W_S = 0.5[mm]
  H_S = 5[mm]
  W_H = 0.5[mm]
  H_H = 5[mm]
  K_Al = 238
  V_0 = 20[V]

Probes
  point1: Point "Point Probe 1" on points 11 | probename = T1; expr = T; unit = K; descr = Temperature; table = tbl4
  point2: Point "Point Probe 2" on points 14 | probename = T2; expr = T; unit = K; descr = Temperature; table = tbl4
  var1: GlobalVariable "Global Variable Probe 1" | probename = deltaT; expr = T1-T2; unit = K; table = tbl4

Geometry
  geom1 "Geometry 1" (2D, length unit m)
    r1: Rectangle "Hot Cu" | size = {W_Cu, H_Cu}
    r2: Rectangle "Cold Cu" | pos = {15[mm], 0}; size = {W_Cu, H_Cu}
    r3: Rectangle "Al" | pos = {0, 10[mm]}; size = {W_Al, H_Al}
    r4: Rectangle "Silica Insulator" | pos = {-0.5[mm], 0}; size = {W_S, H_S}
    r5: Rectangle "Heater" | pos = {-1[mm], 0}; size = {W_H, H_H}
    pt1: Point | p = {5e-3, 1.2e-2}
    pt2: Point | p = {15e-3, 1.2e-2}
    fin: Finalize "Form Union"

Materials
  mat1: Common "Copper" on domains 3, 5
    def "Basic"
      relpermeability = 1
      electricconductivity = 5.998e7[S/m]
      thermalexpansioncoefficient = 17e-6[1/K]
      heatcapacity = 385[J/(kg*K)]
      relpermittivity = 1
      density = 8960[kg/m^3]
      thermalconductivity = 400[W/(m*K)]
    Enu "Young's modulus and Poisson's ratio"
      youngsmodulus = 110e9[Pa]
      poissonsratio = 0.35
    linzRes "Linearized resistivity"
      rho0 = 1.72e-8[ohm*m]
      alpha = 0.0039[1/K]
      Tref = 298[K]
  mat2: Common "Aluminum" on domains 4
    def "Basic"
      relpermeability = 1
      heatcapacity = 900[J/(kg*K)]
      thermalconductivity = K_Al
      electricconductivity = 3.774e7[S/m]
      relpermittivity = 1
      thermalexpansioncoefficient = 23e-6[1/K]
      density = 2700[kg/m^3]
    Enu "Young's modulus and Poisson's ratio"
      youngsmodulus = 70e9[Pa]
      poissonsratio = 0.33
    Murnaghan
      l = -2.5e11[Pa]
      m = -3.3e11[Pa]
      n = -3.5e11[Pa]
    Lame "Lamé parameters"
      lambLame = 5.1e10[Pa]
      muLame = 2.6e10[Pa]
  mat3: Common "Nimonic alloy 90" on domains 1
    def "Basic"
      relpermeability = 1
      electricconductivity = 8.475e5[S/m]
      thermalexpansioncoefficient = 12.7e-6[1/K]
      heatcapacity = 446[J/(kg*K)]
      relpermittivity = 1
      density = 8180[kg/m^3]
      thermalconductivity = 11.5[W/(m*K)]
      resistivity = 0.5
    Enu "Young's modulus and Poisson's ratio"
      youngsmodulus = 219e9[Pa]
      poissonsratio = 0.28
  mat4: Common "Silica glass" on domains 2
    def "Basic"
      relpermeability = 1
      electricconductivity = 1e-14[S/m]
      thermalexpansioncoefficient = 0.55e-6[1/K]
      heatcapacity = 703[J/(kg*K)]
      relpermittivity = 3.75
      density = 2203[kg/m^3]
      thermalconductivity = 1.38[W/(m*K)]
    Enu "Young's modulus and Poisson's ratio"
      youngsmodulus = 73.1e9[Pa]
      poissonsratio = 0.17
    RefractiveIndex
      n = 1.45
      ki = 0

Physics
  ec: ConductiveMedia "Electric Currents" on all domains
    dependent variable V
    d.d = 1[m]
    cucn1: CurrentConservation (default)
    ein1: ElectricInsulation (default)
    init1: init "Initial Values 1" (default)
    gnd1: Ground on boundaries 3
    pot1: ElectricPotential on boundaries 2 | V0 = V_0
  ht: HeatTransfer "Heat Transfer in Solids" on all domains
    dependent variable T
    PhysicalModelProperty.dz = 1[m]
    solid1: SolidHeatTransferModel "Solid 1" (default)
    init1: init "Initial Values 1" (default)
    ins1: ThermalInsulation (default)
    temp1: TemperatureBoundary "Temperature 1" on boundaries 2, 3

Multiphysics
  emh1: ElectromagneticHeating on all domains | EMHeat_physics = ec; Heat_physics = ht

Mesh
  mesh1 "Mesh 1" (physics-controlled)
    size: MeshSizeDefault | hauto = 4

Studies
  std1 "Study 1"
    param: Parametric "Parametric Sweep" | pname = V_0; plistarr = range(1,1,20); punit = V
    stat: Stationary (disabled)
    time: Transient "Time Dependent" | tlist = range(0,1,100)

Tables
  tbl2: Table
    X | Height
    0 | -3.18323e-12
    1 | 122739
    2 | 334211
    3 | 492047
    4 | 599608
    5 | 669824
    6 | 715319
    7 | 743740
    8 | 759105
    9 | 766106
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  tbl3: Table
    // Global Variable Probe 1
    Time (s) | T1-T2 (K)
    0 | -3.18323e-12
    1 | 122739
    2 | 334211
    3 | 492047
    4 | 599608
    5 | 669824
    6 | 715319
    7 | 743740
    8 | 759105
    9 | 766106
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  tbl4: Table "Probe Table 4"
    Time (s) | Temperature (K), Point Probe 1 | Temperature (K), Point Probe 2 | T1-T2 (K)
    0 | 293.15 | 293.15 | -3.97904e-13
    9.00219e-06 | 293.15 | 293.15 | 5.68434e-14
    1.80044e-05 | 293.15 | 293.15 | 1.08002e-12
    3.60088e-05 | 293.15 | 293.15 | 3.86535e-12
    7.20175e-05 | 293.15 | 293.15 | 6.76437e-12
    0.000144035 | 293.15 | 293.15 | -2.84217e-13
    0.00028807 | 293.15 | 293.15 | -5.96856e-12
    0.00057614 | 293.15 | 293.15 | 5.68434e-14
    0.00086421 | 293.15 | 293.15 | 9.09495e-13
    0.00144035 | 293.15 | 293.15 | -2.27374e-13
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  tbl5: Table
    // Global Variable Probe 1
    Time (s) | V_0=1, T1-T2 (K) | V_0=2, T1-T2 (K) | V_0=3, T1-T2 (K) | V_0=4, T1-T2 (K) | V_0=5, T1-T2 (K) | V_0=6, T1-T2 (K) | V_0=7, T1-T2 (K) | V_0=8, T1-T2 (K) | V_0=9, T1-T2 (K) | V_0=10, T1-T2 (K) | V_0=11, T1-T2 (K)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
    0 | 5.68434e-14 | 5.68434e-14 | 5.68434e-14 | 5.68434e-14 | 0 | 0 | 0 | -5.68434e-14 | -5.68434e-14 | 0 | 0
    1 | 48.8461 | 195.929 | 441.281 | 783.596 | 1227.15 | 1766.42 | 2410.92 | 3139.33 | 3975.69 | 4912.76 | 5948.4
    2 | 133.493 | 534.164 | 1202.74 | 2138.32 | 3341.61 | 4811.92 | 6550.75 | 8557.94 | 10828.1 | 13367.9 | 16174.9
    3 | 196.877 | 787.445 | 1772.12 | 3151.77 | 4919.29 | 7090.84 | 9642.09 | 12602.9 | 15951 | 19684.7 | 23812.4
    4 | 240.357 | 959.446 | 2158.08 | 3843 | 6002.18 | 8643.13 | 11736.7 | 15384.4 | 19454.1 | 23977.7 | 28986.9
    5 | 269.614 | 1072.04 | 2415.02 | 4292.82 | 6717.14 | 9656.21 | 13137.7 | 17203.8 | 21736.3 | 26789.6 | 32440.7
    6 | 288.577 | 1146.49 | 2582.66 | 4582.63 | 7169.68 | 10311.4 | 14043.7 | 18347.8 | 23180.1 | 28619.8 | 34685.4
    7 | 299.688 | 1192.51 | 2682.38 | 4764.22 | 7440.66 | 10720.6 | 14584.6 | 19033.8 | 24070.1 | 29758.6 | 36023.5
    8 | 305.408 | 1216.75 | 2737.15 | 4868.87 | 7588.37 | 10949.1 | 14876.4 | 19411.8 | 24580.8 | 30368.7 | 36745.5
    9 | 307.585 | 1227.07 | 2760.12 | 4910.82 | 7666.09 | 11046.5 | 15013.7 | 19603.4 | 24822.1 | 30626.7 | 37061.9
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
Plots
  pg8: PlotGroup1D "Probe Plot Group 8" | data = none
    tblp1: Table "Probe Table Graph 1"
      table = tbl5
      plotcolumns = {2, 3, 4, 5, 6, 7, 8, 9, 10, 11, 12, 13, 14, 15, 16, 17, 18, 19, 20, 21}