// COMSOL Multiphysics 5.6.0.280 model "Task 3.3 varying thermal conductivity.mph"
// Outline of the model tree

Parameters
  W_Cu = 5[mm]
  H_Cu = 10[mm]
  W_Al = 20[mm]
  H_Al = 2[mm]
  W_S = 0.5[mm]
  H_S = 5[mm]
  W_H = 0.5[mm]
  H_H = 5[mm]
  K_Al = 238

Geometry
  geom1 "Geometry 1" (2D, length unit m)
    r1: Rectangle "Hot Cu" | size = {W_Cu, H_Cu}
    r2: Rectangle "Cold Cu" | pos = {15[mm], 0}; size = {W_Cu, H_Cu}
    r3: Rectangle "Al" | pos = {0, 10[mm]}; size = {W_Al, H_Al}
    r4: Rectangle "Silica Insulator" | pos = {-0.5[mm], 0}; size = {W_S, H_S}
    r5: Rectangle "Heater" | pos = {-1[mm], 0}; size = {W_H, H_H}
    fin: Finalize "Form Union"

Materials
  mat1: Common "Copper" on domains 3, 5
    def "Basic"
      relpermeability = 1
      electricconductivity = 5.998e7[S/m]
      thermalexpansioncoefficient = 17e-6[1/K]
      heatcapacity = 385[J/(kg*K)]
      relpermittivity = 1
      density = 8960[kg/m^3]
      thermalconductivity = 400[W/(m*K)]
    Enu "Young's modulus and Poisson's ratio"
      youngsmodulus = 110e9[Pa]
      poissonsratio = 0.35
    linzRes "Linearized resistivity"
      rho0 = 1.72e-8[ohm*m]
      alpha = 0.0039[1/K]
      Tref = 298[K]
  mat2: Common "Aluminum" on domains 4
    def "Basic"
      relpermeability = 1
      heatcapacity = 900[J/(kg*K)]
      thermalconductivity = K_Al
      electricconductivity = 3.774e7[S/m]
      relpermittivity = 1
      thermalexpansioncoefficient = 23e-6[1/K]
      density = 2700[kg/m^3]
    Enu "Young's modulus and Poisson's ratio"
      youngsmodulus = 70e9[Pa]
      poissonsratio = 0.33
    Murnaghan
      l = -2.5e11[Pa]
      m = -3.3e11[Pa]
      n = -3.5e11[Pa]
    Lame "Lamé parameters"
      lambLame = 5.1e10[Pa]
      muLame = 2.6e10[Pa]
  mat3: Common "Nimonic alloy 90" on domains 1
    def "Basic"
      relpermeability = 1
      electricconductivity = 8.475e5[S/m]
      thermalexpansioncoefficient = 12.7e-6[1/K]
      heatcapacity = 446[J/(kg*K)]
      relpermittivity = 1
      density = 8180[kg/m^3]
      thermalconductivity = 11.5[W/(m*K)]
      resistivity = 0.5
    Enu "Young's modulus and Poisson's ratio"
      youngsmodulus = 219e9[Pa]
      poissonsratio = 0.28
  mat4: Common "Silica glass" on domains 2
    def "Basic"
      relpermeability = 1
      electricconductivity = 1e-14[S/m]
      thermalexpansioncoefficient = 0.55e-6[1/K]
      heatcapacity = 703[J/(kg*K)]
      relpermittivity = 3.75
      density = 2203[kg/m^3]
      thermalconductivity = 1.38[W/(m*K)]
    Enu "Young's modulus and Poisson's ratio"
      youngsmodulus = 73.1e9[Pa]
      poissonsratio = 0.17
    RefractiveIndex
      n = 1.45
      ki = 0

Physics
  ec: ConductiveMedia "Electric Currents" on all domains
    dependent variable V
    d.d = 1[m]
    cucn1: CurrentConservation (default)
    ein1: ElectricInsulation (default)
    init1: init "Initial Values 1" (default)
    gnd1: Ground on boundaries 3
    pot1: ElectricPotential on boundaries 2 | V0 = 20
  ht: HeatTransfer "Heat Transfer in Solids" on all domains
    dependent variable T
    PhysicalModelProperty.dz = 1[m]
    solid1: SolidHeatTransferModel "Solid 1" (default)
    init1: init "Initial Values 1" (default)
    ins1: ThermalInsulation (default)
    temp1: TemperatureBoundary "Temperature 1" on boundaries 2, 3

Multiphysics
  emh1: ElectromagneticHeating on all domains | EMHeat_physics = ec; Heat_physics = ht

Mesh
  mesh1 "Mesh 1" (physics-controlled)
    size: MeshSizeDefault | hauto = 2

Studies
  std1 "Study 1"
    param: Parametric "Parametric Sweep" | pname = K_Al; plistarr = range(100,100,1000)
    stat: Stationary (disabled)
    time: Transient "Time Dependent" | tlist = range(0,0.1,1)